<?xml version="1.0"?>
<?xml-stylesheet type="text/xsl" href="http://jsbsim.sourceforge.net/JSBSim.xsl"?>
<fdm_config name="unnamed" version="2.0" release="ALPHA"
   xmlns:xsi="http://www.w3.org/2001/XMLSchema-instance"
   xsi:noNamespaceSchemaLocation="http://jsbsim.sourceforge.net/JSBSim.xsd">

 <fileheader>
  <author> Aeromatic v 0.9, Dave Culp </author>
  <filecreationdate> now </filecreationdate>
  <version> 0.1 </version>
  <description> Models a TF-104G. </description>
 </fileheader>

<!--
  File:     unnamed.xml
  Inputs:
    name:          unnamed
    type:          single-engine transonic/supersonic fighter
    max weight:    29027.0 lb
    wing span:     21.75 ft
    length:        54.65 ft
    wing area:     196.1 sq-ft
    gear type:     tricycle
    retractable?:  yes
    # engines:     1
    engine type:   turbine
    engine layout: aft fuselage
    yaw damper?    yes
  Outputs:
    wing loading:  148.02 lb/sq-ft
    CL-alpha:      3.5 per radian
    CL-0:          0.08
    CL-max:        1
    CD-0:          0.021
    K:             0.09

-->

 <metrics>
   <wingarea  unit="FT2">  196.10 </wingarea>
   <wingspan  unit="FT" >   21.75 </wingspan>
   <wing_incidence>          2.00 </wing_incidence>
   <chord     unit="FT" >    9.02 </chord>
   <htailarea unit="FT2">   48.00 </htailarea>
   <htailarm  unit="FT" >   18.00 </htailarm>
   <vtailarea unit="FT2">   43.00 </vtailarea>
   <vtailarm  unit="FT" >   21.86 </vtailarm>
   <location name="AERORP" unit="IN">
     <x> 386.00 </x>
     <y>   0.00 </y>
     <z>   6.00 </z>
   </location>
   <location name="EYEPOINT" unit="IN">
     <x> 131.16 </x>
     <y>   0.00 </y>
     <z>  36.00 </z>
   </location>
   <location name="VRP" unit="IN">
     <x>386</x>
     <y>0</y>
     <z>0</z>
   </location>
 </metrics>

 <mass_balance>
   <ixx unit="SLUG*FT2">      3600 </ixx>
   <iyy unit="SLUG*FT2">     59000 </iyy>
   <izz unit="SLUG*FT2">     60000 </izz>
   <ixy unit="SLUG*FT2">         0 </ixy>
   <ixz unit="SLUG*FT2">         0 </ixz>
   <iyz unit="SLUG*FT2">         0 </iyz>
   <emptywt unit="LBS" >     14000 </emptywt>
   <location name="CG" unit="IN">
     <x> 386.00 </x>
     <y>   0.00 </y>
     <z>  -6.00 </z>
   </location>
 </mass_balance>

 <ground_reactions>

  <contact type="BOGEY" name="NOSE">
   <location unit="IN">
     <x> 216.00 </x>
     <y>   0.00 </y>
     <z> -68.00 </z>
   </location>
   <static_friction>  0.80 </static_friction>
   <dynamic_friction> 0.50 </dynamic_friction>
   <rolling_friction> 0.02 </rolling_friction>
   <spring_coeff unit="LBS/FT">      10000.00 </spring_coeff>
   <damping_coeff unit="LBS/FT/SEC">  4000.00 </damping_coeff>
   <max_steer unit="DEG"> 60.0 </max_steer>
   <brake_group>NONE</brake_group>
   <retractable>1</retractable>
 </contact>

  <contact type="BOGEY" name="LEFT_MAIN">
   <location unit="IN">
     <x> 398.00 </x>
     <y> -60.00 </y>
     <z> -70.00 </z>
   </location>
   <static_friction>  0.80 </static_friction>
   <dynamic_friction> 0.50 </dynamic_friction>
   <rolling_friction> 0.02 </rolling_friction>
   <spring_coeff unit="LBS/FT">      21000.00 </spring_coeff>
   <damping_coeff unit="LBS/FT/SEC">  8800.00 </damping_coeff>
   <max_steer unit="DEG">0</max_steer>
   <brake_group>LEFT</brake_group>
   <retractable>1</retractable>
 </contact>

  <contact type="BOGEY" name="RIGHT_MAIN">
   <location unit="IN">
     <x> 398.00 </x>
     <y>  60.00 </y>
     <z> -70.00 </z>
   </location>
   <static_friction>  0.80 </static_friction>
   <dynamic_friction> 0.50 </dynamic_friction>
   <rolling_friction> 0.02 </rolling_friction>
   <spring_coeff unit="LBS/FT">      21000.00 </spring_coeff>
   <damping_coeff unit="LBS/FT/SEC">  8800.00 </damping_coeff>
   <max_steer unit="DEG">0</max_steer>
   <brake_group>RIGHT</brake_group>
   <retractable>1</retractable>
 </contact>

  <contact type="STRUCTURE" name="LEFT_WING">
    <location unit="IN">
     <x> 423.00 </x>
     <y>-130.00 </y>
     <z> -12.00 </z>
    </location>
    <static_friction>  0.80 </static_friction>
    <dynamic_friction> 0.50 </dynamic_friction>
    <spring_coeff unit="LBS/FT">      29027.00 </spring_coeff>
    <damping_coeff unit="LBS/FT/SEC">  5805.40 </damping_coeff>
 </contact>

  <contact type="STRUCTURE" name="RIGHT_WING">
    <location unit="IN">
     <x> 423.00 </x>
     <y> 130.00 </y>
     <z> -12.00 </z>
    </location>
    <static_friction>  0.80 </static_friction>
    <dynamic_friction> 0.50 </dynamic_friction>
    <spring_coeff unit="LBS/FT">      29027.00 </spring_coeff>
    <damping_coeff unit="LBS/FT/SEC">  5805.40 </damping_coeff>
 </contact>

  <contact type="STRUCTURE" name="AFT_FUSELAGE">
    <location unit="IN">
     <x> 600 </x>
     <y>   0 </y>
     <z> -20 </z>
    </location>
    <static_friction>  0.80 </static_friction>
    <dynamic_friction> 0.50 </dynamic_friction>
    <spring_coeff unit="LBS/FT">      40000.00 </spring_coeff>
    <damping_coeff unit="LBS/FT/SEC">  8000.00 </damping_coeff>
 </contact>

  <contact type="STRUCTURE" name="FWD_FUSELAGE">
    <location unit="IN">
     <x>  50 </x>
     <y>   0 </y>
     <z> -20 </z>
    </location>
    <static_friction>  0.80 </static_friction>
    <dynamic_friction> 0.50 </dynamic_friction>
    <spring_coeff unit="LBS/FT">      40000.00 </spring_coeff>
    <damping_coeff unit="LBS/FT/SEC">  8000.00 </damping_coeff>
 </contact>
 </ground_reactions>

 <propulsion>

   <engine file="J79">
    <location unit="IN">
      <x> 595.80 </x>
      <y>   0.00 </y>
      <z>   0.00 </z>
    </location>
    <feed>0</feed>
    <feed>1</feed>
    <feed>2</feed>
    <feed>3</feed>
    <feed>4</feed>
    <thruster file="direct">
     <location unit="IN">
       <x> 632.00 </x>
       <y>   0.00 </y>
       <z>   0.00 </z>
     </location>
     <orient unit="DEG">
       <pitch> 0.00 </pitch>
       <roll>  0.00 </roll>
       <yaw>   0.00 </yaw>
     </orient>
    </thruster>
  </engine>

  <tank type="FUEL" number="0"><!-- internal -->
     <location unit="IN">
       <x> 386.00 </x>
       <y>   0.00 </y>
       <z>  -6.00 </z>
     </location>
     <priority>2</priority>
     <capacity unit="LBS"> 5000.0 </capacity>
     <contents unit="LBS"> 5000.0 </contents>
  </tank>

  <tank type="FUEL" number="1"><!-- left tip tank -->
     <location unit="IN">
       <x> 386.00 </x>
       <y>-138.00 </y>
       <z> -18.00 </z>
     </location>
     <capacity unit="LBS"> 1130.0 </capacity>
     <contents unit="LBS"> 1130.0 </contents>
  </tank>

  <tank type="FUEL" number="2"><!-- left underwing tank -->
     <location unit="IN">
       <x> 386.00 </x>
       <y>-100.00 </y>
       <z>  -6.00 </z>
     </location>
     <capacity unit="LBS"> 1130.0 </capacity>
     <contents unit="LBS"> 1130.0 </contents>
  </tank>

  <tank type="FUEL" number="3"><!-- right tip tank -->
     <location unit="IN">
       <x> 386.00 </x>
       <y> 138.00 </y>
       <z> -18.00 </z>
     </location>
     <capacity unit="LBS"> 1130.0 </capacity>
     <contents unit="LBS"> 1130.0 </contents>
  </tank>

  <tank type="FUEL" number="4"><!-- right underwing tank -->
     <location unit="IN">
       <x> 386.00 </x>
       <y> 100.00 </y>
       <z>  -6.00 </z>
     </location>
     <capacity unit="LBS"> 1130.0 </capacity>
     <contents unit="LBS"> 1130.0 </contents>
  </tank>

 </propulsion>

 <system file="hook"/>
 <system file="BLC"/>
 <system file="refuel"/>
 <system file="gear"/>
 <system file="flaps"/>
 <system file="speedbrakes"/>
 <system file="FCS-pitch"/>
 <system file="FCS-roll"/>
 <system file="FCS-yaw"/>
 <system file="NWS"/>
 <system file="alpha_buffet"/>
 <system file="dump"/>
 <system file="chute"/>
 <system file="crash-detect"/>
 <system file="particles"/>
 <system file="canopy"/>

 <flight_control name="FCS: F-104"/>

 <aerodynamics>

        <function name="aero/function/kCLge">
            <description>Change_in_lift_due_to_ground_effect</description>
            <product>
                  <table>
                      <independentVar>aero/h_b-mac-ft</independentVar>
                      <tableData>
                          0.0000	1.2290
                          0.1000	1.1240
                          0.1500	1.1160
                          0.2000	1.1240
                          0.3000	1.1050
                          0.4000	1.0410
                          0.5000	1.0340
                          0.6000	1.0190
                          0.7000	1.0080
                          0.8000	1.0030
                          0.9000	1.0010
                          1.0000	1.0000
                          1.1000	1.0000
                      </tableData>
                  </table>
            </product>
        </function>

  <axis name="LIFT">

    <function name="aero/coefficient/CLalpha">
      <description>Lift_due_to_alpha</description>
      <product>
          <property>aero/qbar-psf</property>
          <property>metrics/Sw-sqft</property>
          <property>aero/function/kCLge</property>
          <table>
            <independentVar lookup="row">aero/alpha-rad</independentVar>
            <tableData>
              -0.20 -0.620
               0.00  0.040
               0.26  0.850
               0.60  0.300
            </tableData>
          </table>
      </product>
    </function>

    <function name="aero/coefficient/dCLflap">
       <description>Delta_Lift_due_to_flaps</description>
       <product>
           <property>aero/qbar-psf</property>
           <property>metrics/Sw-sqft</property>
           <property>fcs/flap-pos-deg</property>
           <value> 0.005 </value>
       </product>
    </function>

    <function name="aero/coefficient/CLde">
       <description>Lift_due_to_Elevator_Deflection</description>
       <product>
           <property>aero/qbar-psf</property>
           <property>metrics/Sw-sqft</property>
           <property>fcs/elevator-pos-rad</property>
           <value> 0.24 </value>
       </product>
    </function>

    <function name="aero/coefficient/dCLBLC">
       <description>Delta_Lift_due_to_BLC</description>
       <product>
           <property>aero/qbar-psf</property>
           <property>metrics/Sw-sqft</property>
           <property>systems/BLC/active</property>
           <value> 0.1 </value>
       </product>
    </function>

    <function name="aero/coefficient/buffet">
       <description>Buffet at high alpha</description>
         <product>
           <property>aero/alpha_buffet/sine_wave</property>
           <property>aero/alpha_buffet/strength</property>
         </product>
    </function>

  </axis>

  <axis name="DRAG">

    <function name="aero/coefficient/CD0">
       <description>Drag_at_zero_lift</description>
       <product>
          <property>aero/qbar-psf</property>
          <property>metrics/Sw-sqft</property>
          <table>
            <independentVar lookup="row">aero/alpha-rad</independentVar>
            <tableData>
             -1.40    1.500
             -0.20    0.027
              0.00    0.020
              0.20    0.027
              1.40    1.500
            </tableData>
          </table>
       </product>
    </function>

    <function name="aero/coefficient/CDi">
       <description>Induced_drag</description>
         <product>
           <property>aero/qbar-psf</property>
           <property>metrics/Sw-sqft</property>
           <property>aero/cl-squared</property>
           <value>0.17</value>
         </product>
    </function>

    <function name="aero/coefficient/CDmach">
       <description>Drag_due_to_mach</description>
        <product>
          <property>aero/qbar-psf</property>
          <property>metrics/Sw-sqft</property>
          <table>
            <independentVar lookup="row">velocities/mach</independentVar>
            <tableData>
                0.00      0.000
                0.81      0.000
                1.10      0.018
                1.80      0.005
            </tableData>
          </table>
        </product>
    </function>

    <function name="aero/coefficient/CDflap">
       <description>Drag_due_to_flaps</description>
         <product>
           <property>aero/qbar-psf</property>
           <property>metrics/Sw-sqft</property>
           <property>fcs/flap-pos-deg</property>
           <value> 0.0018 </value>
         </product>
    </function>

    <function name="aero/coefficient/CDgear">
       <description>Drag_due_to_gear</description>
         <product>
           <property>aero/qbar-psf</property>
           <property>metrics/Sw-sqft</property>
           <property>gear/gear-pos-norm</property>
           <value>0.03</value>
         </product>
    </function>

    <function name="aero/coefficient/CDsb">
       <description>Drag_due_to_speedbrakes</description>
         <product>
           <property>aero/qbar-psf</property>
           <property>metrics/Sw-sqft</property>
           <property>fcs/speedbrake-pos-norm</property>
           <value>0.024</value>
         </product>
    </function>

    <function name="aero/coefficient/CDbc">
       <description>Drag_due_to_braking_chute</description>
         <product>
           <property>aero/qbar-psf</property>
           <property>metrics/Sw-sqft</property>
           <property>systems/chute/unfurl-norm</property>
           <value>0.5</value>
         </product>
    </function>

    <function name="aero/coefficient/CDbeta">
       <description>Drag_due_to_sideslip</description>
       <product>
          <property>aero/qbar-psf</property>
          <property>metrics/Sw-sqft</property>
          <table>
            <independentVar lookup="row">aero/beta-rad</independentVar>
            <tableData>
              -1.40    1.230
              -0.26    0.050
               0.00    0.000
               0.26    0.050
               1.40    1.230
            </tableData>
          </table>
       </product>
    </function>

    <function name="aero/coefficient/CDde">
       <description>Drag_due_to_Elevator_Deflection</description>
       <product>
           <property>aero/qbar-psf</property>
           <property>metrics/Sw-sqft</property>
           <abs><property>fcs/elevator-pos-norm</property></abs>
           <value>0.05</value>
       </product>
    </function>

  </axis>

  <axis name="SIDE">

    <function name="aero/coefficient/CYb">
       <description>Side_force_due_to_beta</description>
       <product>
           <property>aero/qbar-psf</property>
           <property>metrics/Sw-sqft</property>
           <property>aero/beta-rad</property>
           <value>-1</value>
       </product>
    </function>

  </axis>

  <axis name="ROLL">

    <function name="aero/coefficient/Clb">
       <description>Roll_moment_due_to_beta</description>
       <product>
           <property>aero/qbar-psf</property>
           <property>metrics/Sw-sqft</property>
           <property>metrics/bw-ft</property>
           <property>aero/beta-rad</property>
           <value>-0.01</value>
       </product>
    </function>

    <function name="aero/coefficient/Clp">
       <description>Roll_moment_due_to_roll_rate</description>
       <product>
           <property>aero/qbar-psf</property>
           <property>metrics/Sw-sqft</property>
           <property>metrics/bw-ft</property>
           <property>aero/bi2vel</property>
           <property>velocities/p-aero-rad_sec</property>
           <value>-0.4</value>
       </product>
    </function>

    <function name="aero/coefficient/Clr">
       <description>Roll_moment_due_to_yaw_rate</description>
       <product>
           <property>aero/qbar-psf</property>
           <property>metrics/Sw-sqft</property>
           <property>metrics/bw-ft</property>
           <property>aero/bi2vel</property>
           <property>velocities/r-aero-rad_sec</property>
           <value>0.12</value>
       </product>
    </function>

    <function name="aero/coefficient/Clda">
       <description>Roll_moment_due_to_aileron</description>
       <product>
          <property>aero/qbar-psf</property>
          <property>metrics/Sw-sqft</property>
          <property>metrics/bw-ft</property>
          <property>fcs/left-aileron-pos-rad</property>
          <table>
            <independentVar lookup="row">velocities/mach</independentVar>
            <tableData>
              0.0    0.110
              2.0    0.037
            </tableData>
          </table>
       </product>
    </function>

    <function name="aero/coefficient/Cldr">
       <description>Roll_moment_due_to_rudder</description>
       <product>
           <property>aero/qbar-psf</property>
           <property>metrics/Sw-sqft</property>
           <property>metrics/bw-ft</property>
           <property>fcs/rudder-pos-rad</property>
           <value>0.006</value>
       </product>
    </function>

  </axis>

  <axis name="PITCH">

    <function name="aero/coefficient/Cmalpha">
       <description>Pitch_moment_due_to_alpha</description>
       <product>
           <property>aero/qbar-psf</property>
           <property>metrics/Sw-sqft</property>
           <property>metrics/cbarw-ft</property>
           <property>aero/alpha-rad</property>
           <value>-0.3</value>
       </product>
    </function>

    <function name="aero/coefficient/Cmde">
       <description>Pitch_moment_due_to_elevator</description>
       <product>
          <property>aero/qbar-psf</property>
          <property>metrics/Sw-sqft</property>
          <property>metrics/cbarw-ft</property>
          <property>fcs/elevator-pos-rad</property>
          <table>
            <independentVar lookup="row">velocities/mach</independentVar>
            <tableData>
              0.0     -0.700
              2.0     -0.200
            </tableData>
          </table>
       </product>
    </function>

    <function name="aero/coefficient/Cmq">
       <description>Pitch_moment_due_to_pitch_rate</description>
       <product>
           <property>aero/qbar-psf</property>
           <property>metrics/Sw-sqft</property>
           <property>metrics/cbarw-ft</property>
           <property>aero/ci2vel</property>
           <property>velocities/q-aero-rad_sec</property>
           <value>-18</value>
       </product>
    </function>

    <function name="aero/coefficient/Cmadot">
       <description>Pitch_moment_due_to_alpha_rate</description>
       <product>
           <property>aero/qbar-psf</property>
           <property>metrics/Sw-sqft</property>
           <property>metrics/cbarw-ft</property>
           <property>aero/ci2vel</property>
           <property>aero/alphadot-rad_sec</property>
           <value>-9</value>
       </product>
    </function>


  </axis>

  <axis name="YAW">

    <function name="aero/coefficient/Cnb">
       <description>Yaw_moment_due_to_beta</description>
       <product>
           <property>aero/qbar-psf</property>
           <property>metrics/Sw-sqft</property>
           <property>metrics/bw-ft</property>
           <property>aero/beta-rad</property>
           <value>0.12</value>
       </product>
    </function>

    <function name="aero/coefficient/Cnr">
       <description>Yaw_moment_due_to_yaw_rate</description>
       <product>
           <property>aero/qbar-psf</property>
           <property>metrics/Sw-sqft</property>
           <property>metrics/bw-ft</property>
           <property>aero/bi2vel</property>
           <property>velocities/r-aero-rad_sec</property>
           <value>-0.17</value>
       </product>
    </function>

    <function name="aero/coefficient/Cndr">
       <description>Yaw_moment_due_to_rudder</description>
       <product>
           <property>aero/qbar-psf</property>
           <property>metrics/Sw-sqft</property>
           <property>metrics/bw-ft</property>
           <property>fcs/rudder-pos-rad</property>
           <value>-0.02</value>
       </product>
    </function>

  </axis>

 </aerodynamics>

 <external_reactions>

  <force name="hook" frame="BODY">
   <location unit="IN">
     <x>  505.0 </x>
     <y>    0.0 </y>
     <z>  -30.0 </z>
   </location>
   <direction>
     <x>   0.9902681 </x>
     <y>   0.1391731 </y>
     <z>   0.01 </z>
   </direction>
  </force>

 </external_reactions>

</fdm_config>
